// SBML level 2 version 4

model CirCl__1j1__2_3e_4_i_1294832250786()

  // Compartments:
  compartment default = 1 volume;
  compartment first in default = 1 area;  // 2-D

  // Species:
  species mRNA in first = 1/first; mRNA is "message RNA";
  species Fc in default = 0;
  species Fn in first = 0;

  // Parameters:
  Vs = 1.6 substance;
  K = 1 substance;
  n = 4 substance;
  Vm = 0.505 substance;
  Km = 0.5 substance;
  ks = 0.5 substance;
  Vd = 1.4 substance;
  Kd = 0.13 substance;
  k1 = 0.5 substance;
  k2 = 0.6 substance;

  // Rate rules:
  mRNA' = Vs*K^n/(K^n + Fn^n) - Vm*mRNA/(Km + mRNA);
  Fc' = ks*mRNA - Vd*Fc/(Kd + Fc) - k1*Fc + k2*Fn;
  Fn' = k1*Fc - k2*Fn;

  // Constraints:
  constraint (K < 20) && (K > 0);
  constraint (Kd < 10) && (Kd > 0);
  constraint (Km < 10) && (Km > 0);
  constraint (Vd < 10) && (Vd > 0);
  constraint (Vm < 20) && (Vm > 0);
  constraint (Vs < 20) && (Vs > 0);
  constraint (k1 < 20) && (k1 > 0);
  constraint (k2 < 20) && (k2 > 0);
  constraint (ks < 10) && (ks > 0);

  // Unit definitions:
  unit substance = mole;
  unit volume = litre;
  unit area = metre^2;
  unit length = metre;
  unit time = second;
end
